// COMSOL Multiphysics 5.5.0.359 model "wCNTP_lipid1801_test.mph"
// Outline of the model tree

Parameters
  Vp = 0.1 [V]  // voltage
  CT = 100 [mM]  // top chamber conc (KCl)
  CB = 100[mM]  // bottom chamber conc (KCl)
  ChargeCNT = -0.328[C/m^2]  // charge desity of CNT entrance
  ChargeSiN = 0 [C/m^2]  // surface charge desity of SiN aperture
  Pr_lipid = 1  // Relative Permittivity of lipid bilayer
  Vg = 0 [V]  // gate voltage
  Rlipid = 20 [nm]  // r of lipid
  ChargeCNTwall = -3 [mC/m^2]  // surface charge desity of CNT wall
  Pr_lipid_c = 80  // Center, hydrophobic part
  ChargeCNTp = -101.8 [pC/m]  // point charge (CNT entrance_trial)
  SlipL = 1[nm]  // Slip length of CNT wall
  CNTdielectric = 100  // Relative Permittivity of CNT
  Rchannel = 0.58 [nm]  // Radis of inner channer

Geometry
  geom1 "Geometry 1" (2D axisymmetric, length unit m)
    r1: Rectangle "Channel" | pos = {0, 50 [nm]}; size = {Rchannel, 10 [nm]}
    r8: Rectangle "CNT" | pos = {Rchannel, 50 [nm]}; size = {0.34 [nm], 10 [nm]}
    r2: Rectangle "ChamberT" | size = {50 [nm], 50 [nm]}
    r3: Rectangle "ChamberB" | pos = {0, 60 [nm]}; size = {50 [nm], 50 [nm]}
    r4: Rectangle "Lipid_c" | pos = {Rchannel+0.34 [nm], 52 [nm]}; size = {Rlipid, 6 [nm]}
    r5: Rectangle "Aperture"
      pos = {Rlipid+Rchannel+0.34 [nm], 50 [nm]}
      size = {50 [nm]-Rchannel-0.34 [nm]-Rlipid, 10 [nm]}
    r6: Rectangle "Lipid_t" | pos = {Rchannel+0.34 [nm], 58 [nm]}; size = {Rlipid, 2 [nm]}
    r7: Rectangle "Lipid_b" | pos = {Rchannel+0.34 [nm], 50 [nm]}; size = {Rlipid, 2 [nm]}
    fin: Finalize "Form Union"

Materials
  mat1: Common "Water" on domains 1-3
    def "Basic"
      thermalexpansioncoefficient = alpha_p(T)
      bulkviscosity = muB(T)
      dynamicviscosity = eta(T)
      ratioofspecificheat = gamma_w(T)
      electricconductivity = 5.5e-6[S/m]
      heatcapacity = Cp(T)
      density = rho(T)
      thermalconductivity = k(T)
      soundspeed = cs(T)
      relpermittivity = 80
      eta: Piecewise
        arg = T
        pieces = 
          {273.15, 413.15, 1.3799566804-0.021224019151*T^1+1.3604562827E-4*T^2-4.6454090319E-7*T^3+8.9042735735E-10*T^4-9.0790692686E-13*T^5+3.8457331488E-16*T^6}
          {413.15, 553.75, 0.00401235783-2.10746715E-5*T^1+3.85772275E-8*T^2-2.39730284E-11*T^3}
        argunit = K
        fununit = Pa*s
      Cp: Piecewise | arg = T; pieces = {273.15, 553.75, 12010.1471-80.4072879*T^1+0.309866854*T^2-5.38186884E-4*T^3+3.62536437E-7*T^4}; argunit = K; fununit = J/(kg*K)
      rho: Piecewise
        arg = T
        smooth = contd1
        pieces = 
          {273.15, 293.15, 6.3092789034e-05*T^3-0.0603676398829*T^2+18.9229382407066*T-950.704055329848}
          {293.15, 373.15, 1.0335053319e-05*T^3-0.0133950656345*T^2+4.96928883266*T+432.257114008512}
        argunit = K
        fununit = kg/m^3
      k: Piecewise | arg = T; pieces = {273.15, 553.75, -0.869083936+0.00894880345*T^1-1.58366345E-5*T^2+7.97543259E-9*T^3}; argunit = K; fununit = W/(m*K)
      cs: Interpolation | table = {{273, 1403}, {278, 1427}, {283, 1447}, {293, 1481}, {303, 1507}, {313, 1526}, {323, 1541}, {333, 1552}, {343, 1555}, {353, 1555}, {363, 1550}, {373, 1543}}; interp = piecewisecubic; argunit = K; fununit = m/s
      an1: Analytic | funcname = alpha_p; expr = -1/rho(T)*d(rho(T),T); args = T; argunit = K; fununit = 1/K
      an2: Analytic | funcname = gamma_w; expr = 1+(T/Cp(T))*(alpha_p(T)*cs(T))^2; args = T; argunit = K; fununit = 1
      an3: Analytic | funcname = muB; expr = 2.79*eta(T); args = T; argunit = K; fununit = Pa*s
  mat2: Common "Si3N4 - Silicon nitride" on domains 8
    def "Basic"
      electricconductivity = 0[S/m]
      thermalexpansioncoefficient = 2.3e-6[1/K]
      heatcapacity = 700[J/(kg*K)]
      relpermittivity = 9.7
      density = 3100[kg/m^3]
      thermalconductivity = 20[W/(m*K)]
    Enu "Young's modulus and Poisson's ratio"
      youngsmodulus = 250e9[Pa]
      poissonsratio = 0.23
  mat3: Common "Lipid_hydrophobic" on domains 6
    def "Basic"
      relpermittivity = Pr_lipid_c
  mat4: Common "Lipid_hydrophilic" on domains 5, 7
    def "Basic"
      relpermittivity = Pr_lipid
  mat5: Common "C (Carbon, diamond, graphite) (Weber et al. 2010: Graphene; n,k 0.21-1.0 µm)" on domains 4
    def "Basic"
      relpermittivity = CNTdielectric
    RefractiveIndex
      n = n_interp(c_const/freq)
      ki = k_interp(c_const/freq)
      int1: Interpolation "Refractive index"
        funcname = n_interp
        table = 
          {2.10873e-07, 1.375211}
          {2.12461E-7, 1.233285}
          {2.14049e-07, 1.09382}
          {2.15637E-7, 0.967508}
          {2.17225E-7, 0.867752}
          {2.18813E-7, 0.802065}
          {2.20401e-07, 0.767137}
          {2.21989E-7, 0.754486}
          {2.23577E-7, 0.756332}
          {2.25165E-7, 0.767087}
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        interp = piecewisecubic
        argunit = m
        fununit = 1
      int2: Interpolation "Refractive index, imaginary part"
        funcname = k_interp
        table = 
          {2.10873e-07, 0.376681}
          {2.12461E-7, 0.414237}
          {2.14049e-07, 0.48083}
          {2.15637E-7, 0.578555}
          {2.17225E-7, 0.701942}
          {2.18813E-7, 0.836639}
          {2.20401e-07, 0.968274}
          {2.21989E-7, 1.089294}
          {2.23577E-7, 1.197726}
          {2.25165E-7, 1.294131}
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        interp = piecewisecubic
        argunit = m
        fununit = 1
  mat6: Common "Graphite sheet [solid,in-plane]" on no domains
    def "Basic"
      density = rho(T[1/K])[kg/m^3]
      TD = TD_solid_in_plane_2(T[1/K])[m^2/s]
      rho: Piecewise | arg = T; pieces = {293.0, 303.0, 790.0}
      TD_solid_in_plane_2: Piecewise
        arg = T
        pieces = 
          {30.0, 70.0, -1.586626E-4+1.006079E-4*T^1-1.68693E-6*T^2+1.06383E-8*T^3}
          {70.0, 130.0, -0.004613401+1.859233E-4*T^1-1.531155E-6*T^2+3.989362E-9*T^3}
          {130.0, 200.0, -2.29E-4+7.153219E-5*T^1-5.334692E-7*T^2+1.088008E-9*T^3}
          {200.0, 375.0, 0.007246375-5.110401E-5*T^1+1.359599E-7*T^2-1.276446E-10*T^3}
  mat7: Common "Graphite sheet [solid,out-of-plane]" on no domains
    def "Basic"
      density = rho(T[1/K])[kg/m^3]
      TD = TD_solid_out_of_plane_1(T[1/K])[m^2/s]
      rho: Piecewise | arg = T; pieces = {293.0, 303.0, 790.0}
      TD_solid_out_of_plane_1: Piecewise
        arg = T
        pieces = 
          {30.0, 70.0, 3.403089E-6-6.138996E-9*T^1+9.65251E-11*T^2}
          {70.0, 130.0, 1.619299E-6+4.619048E-8*T^1-3.185328E-10*T^2+4.504505E-13*T^3}
          {130.0, 200.0, -4.481424E-7+8.924756E-8*T^1-6.367536E-10*T^2+1.292201E-12*T^3}
          {200.0, 375.0, 6.127682E-6-3.470425E-8*T^1+9.782199E-11*T^2-1.03875E-13*T^3}

Physics
  es: Electrostatics on all domains
    dependent variable V
    ccn1: ChargeConservation (default) | materialType = from_mat
    axi1: AxialSymmetry (default)
    zc1: ZeroCharge (default)
    init1: init "Initial Values 1" (default)
    gnd1: Ground on boundaries 2
    pot1: ElectricPotential on boundaries 7 | V0 = Vp
    scd1: SpaceChargeDensity on domains 1-3 | rhoq = F_const*(c1-c2)
    sfcd1: SurfaceChargeDensity "CNT entrance charge" on boundaries 9, 10 | rhoqs = ChargeCNT
    sfcd3: SurfaceChargeDensity "CNT surface charge" on boundaries 8 | rhoqs = ChargeCNTwall
    sfcd2: SurfaceChargeDensity "SiNx surface charge" on boundaries 18, 19, 21, 22 | rhoqs = ChargeSiN
    pot2: ElectricPotential "3rd electrode" on boundaries 20 | V0 = Vg
    lcg1: LineChargeOutOfPlane "CNT entrance charge (point)" (disabled) on points 5, 6 | Ql = ChargeCNTp
  tds: DilutedSpecies "Transport of Diluted Species" on domains 1-3
    dependent variable c1 = {c1, c2}
    TransportMechanism.Migration = 1
    cdm1: ConvectionDiffusionMigration "Transport Properties 1" (default)
      u_src = root.comp1.u
      DiffusionMaterialList = mat1
      D_c1 = 1.957E-9[m^2/s]
      D_c2 = 2.032E-9[m^2/s]
      z = {1, -1}
      V_src = root.comp1.V
    axi1: AxialSymmetry (default)
    nflx1: NoFlux (default)
    init1: init "Initial Values 1" (default)
    conc1: Concentration "ConcT" on boundaries 7 | species = {1, 1}; c0 = {CT, CT}
    conc2: Concentration "ConcB" on boundaries 2 | species = {1, 1}; c0 = {CB, CB}
  spf: CreepingFlow on domains 1-3
    dependent variable u = {u, v, w}
    fp1: FluidProperties (default)
    init1: init "Initial Values 1" (default)
    axi1: AxialSymmetry (default)
    wallbc1: WallBC "Wall 1" (default)
    open1: OpenBoundary on boundaries 2, 7
    vf1: VolumeForce on domains 1-3 | F = {F_const*(c1-c2)*es.Er, 0, F_const*(c1-c2)*es.Ez}
    wallbc2: WallBC "Slip length" on boundaries 8 | BoundaryCondition = SlipVelocity; UseViscousSlip = 1; Ls = SlipL

Mesh
  mesh1 "Mesh 1"
    size: MeshSizeDefault | hauto = 4
    size1: Size on domains 1, 3, 5-8 | hmax = 1.4E-9; hauto = 3
    size3: Size on domains 2, 4 | hmax = 6E-11; hauto = 1; custom = on
    size2: Size (disabled) on boundaries 4, 6, 8 | hauto = 1
    cr1: CornerRefinement on no domains
    ftri1: FreeTri "Free Triangular 1" on remaining entities
    bl1: BndLayer "Boundary Layers 1" on no domains | sharpcorners = trim
      blp1: BndLayerProp "Boundary Layer Properties 1" on no boundaries
        blnlayers = 1
        blhminfact = 10
        blhmin = 7.37E-10

Studies
  std1 "Study 1"
    param: Parametric "Parametric Sweep" | sweeptype = filled; pname = Vg; plistarr = range(-0.5,0.1,0.5); punit = V
    ref: StudyReference
    stat: Stationary

Solver configurations
  sol1 "Solution 1" (study std1)
    v1: Variables "Dependent Variables 1"
    s1: Stationary "Stationary Solver 1"
      fc1: FullyCoupled | linsolver = d1; initstep = 0.01; minstep = 1.0E-6; maxiter = 100
      d1: Direct | pivotperturb = 1.0E-13
  sol2 "Parametric Solutions 1" (study std1)
  sol3 "Parametric Solutions 2" (study std1)

Datasets
  dset1: Solution | solution = sol1
  dset2: Solution | solution = sol2
  rev1: Revolve2D "Revolution 2D 1" | data = dset2
  rev2: Revolve2D "Revolution 2D 2" | data = dset2; startangle = -90; revangle = 225
  cln1: CutLine2D "Cut Line 2D 1 c" | data = dset3; genpoints = {{0, 55 [nm]}, {0.75[nm], 55 [nm]}}
  cln2: CutLine2D "Cut Line 2D 2 t" | data = dset2; genpoints = {{0, 58 [nm]}, {1 [nm], 58 [nm]}}
  cln3: CutLine2D "Cut Line 2D 3 b" | data = dset2; genpoints = {{0, 52 [nm]}, {1 [nm], 52 [nm]}}
  rev3: Revolve2D "Revolution 2D 3" | data = dset1
  rev4: Revolve2D "Revolution 2D 4" | data = dset1; startangle = -90; revangle = 225
  dset3: Solution "Study 1/Parametric Solutions 2 lipid composition" | solution = sol3
  rev5: Revolve2D "Revolution 2D 5" | data = dset3
  rev6: Revolve2D "Revolution 2D 6" | data = dset3; startangle = -90; revangle = 225
  cln4: CutLine2D "CNTP surface" | data = dset3; genpoints = {{0.58 [nm], 50 [nm]}, {0.58 [nm], 60 [nm]}}
  cln5: CutLine2D "Vg to CNTP" | data = dset3; genpoints = {{0, 55 [nm]}, {20.92 [nm], 55 [nm]}}

Derived values
  int1: IntLine "Current"
    data = cln1
    table = new
    expr = {-F_const*(tds.tflux_c1z-tds.tflux_c2z), -F_const*tds.tflux_c1z, -F_const*tds.tflux_c2z}
    unit = {pA, pA, pA}
    intsurface = on
  int2: IntLine "Line Integration 2"
    data = cln1
    table = new
    expr = {-F_const*tds.tflux_c1z, -F_const*tds.tflux_c2z}
    unit = {pA, pA}
    intsurface = on
  gpev1: EvalPointMatrix "Point Matrix Evaluation 1"
    data = cln4
    table = new
    dataseries = sum
    outerdataseries = average

Plots
  pg19: PlotGroup2D "Electric Potential (es) 2" | data = dset3; dataisaxisym = on
    surf1: Surface | expr = V
  pg20: PlotGroup3D "Electric Potential, Revolved Geometry (es) 2" | data = rev5
    surf1: Surface | expr = V
  pg21: PlotGroup2D "Concentration, c1 (tds) 2" | data = dset3; prefixintitle = Species c1:
    surf1: Surface | expr = c1
    str1: Streamline | expr = {tds.tflux_c1r, tds.tflux_c1z}; pointtype = arrow; arrowlength = logarithmic
  pg22: PlotGroup3D "Concentration, c1, 3D (tds) 2" | data = rev6; typeintitle = off; prefixintitle = Species c1:
    surf1: Surface | expr = c1
  pg23: PlotGroup2D "Concentration, c2 (tds) 2" | data = dset3; prefixintitle = Species c2:
    surf1: Surface | expr = c2
    str1: Streamline | expr = {tds.tflux_c2r, tds.tflux_c2z}; pointtype = arrow; arrowlength = logarithmic
  pg24: PlotGroup3D "Concentration, c2, 3D (tds) 2" | data = rev6; typeintitle = off; prefixintitle = Species c2:
    surf1: Surface | expr = c2
  pg25: PlotGroup2D "Velocity (spf) 2" | data = dset3; dataisaxisym = on
    surf1: Surface | expr = spf.U
  pg26: PlotGroup2D "Pressure (spf) 2" | data = dset3; dataisaxisym = on
    con1: Contour | expr = p; levelrounding = off
  pg27: PlotGroup3D "Velocity, 3D (spf) 2" | data = rev6
    surf1: Surface | expr = spf.U
  pg28: PlotGroup1D "1D Plot Group 28" | data = dset1
  pg29: PlotGroup1D "CNTP surface potential" | data = cln4
    lngr1: LineGraph | expr = V
  pg30: PlotGroup1D "1D Plot Group 30" | data = cln5
    lngr1: LineGraph | expr = V

Exports
  img1: Image
    size = current
    unit = px
    width = 800
    height = 600
    pngfilename = D:\K\Noy's Group\3_Projects\Comsol\061020 Rlipid test\test.png
  plot1: Plot